OpenVSP model (file version 5), 13 components.
Geometry view with OpenVSP parameter names; values to 6 digits, angles in degrees, lengths in the model's unit.
Overall bounding box: X_Min=-0.000808895 X_Len=0.800809 Y_Min=-1.09 Y_Len=2.18 Z_Min=-0.0244097 Z_Len=0.0935295

Wing "Wing"
  location (X Y Z) 0.4 0 0.05, rotation 0 3.65 0
  symmetric about XZ
  bounding box size 0.251503 2.18 0.0351625
  mass: Density=38 Shell_Flag=0 Mass_Area=1 Mass_Prior=0
  totals: TotalSpan=2.18 TotalProjectedSpan=2.18 TotalChord=0.199333 TotalArea=0.434547 TotalAR=10.9365
  root: chord 0.252, twist 0, NACA 4-series Camber=0.04 CamberLoc=0.6 ThickChord=0.13
  sections:
    n  Span      Root_Chord  Tip_Chord  Area       Sweep  Sweep_Location  Dihedral  Twist  Twist_Location  tip airfoil
    1  0.363333  0.252       0.236      0.0886533  0      0.25            0         0      0.25            as above
    2  0.363333  0.236       0.186      0.0766633  0      0.25            0         0      0.25            as above
    3  0.363333  0.186       0.1        0.0519567  0      0.25            0         0      0.25            as above

Stack "Fuselage"
  location (X Y Z) 0 0 0, rotation 0 0 0
  bounding box size 0.800809 0.12 0.0877303
  mass: Density=0.693 Shell_Flag=1 Mass_Area=0.693 Mass_Prior=0
  cross sections:
    n  XDelta  YDelta  ZDelta  shape
    0  0       0       0       point
    1  0.2     0       0.02    super ellipse Super_Height=0.08 Super_M=2 Super_MaxWidthLoc=0 Super_N=2 Super_Width=0.1
    2  0.2     0       0       super ellipse Super_Height=0.08 Super_M=2 Super_MaxWidthLoc=0 Super_N=2 Super_Width=0.12
    3  0.2     0       0       as above
    4  0.2     0       0       circle Circle_Diameter=0.068

Conformal "Inner_Fuselage", child of "Fuselage"
  location (X Y Z) 0 0 0, rotation 0 0 0
  bounding box size 0.787995 0.11 0.0773918
  mass: Density=0 Shell_Flag=0 Mass_Area=1 Mass_Prior=0
  Design: ChordTrimFlag=0 ChordTrimMax=0.9 ChordTrimMin=0.1 Offset=0.005 UTrimFlag=0 UTrimMax=0.9 UTrimMin=0.1 V1TrimBegin=0.3 V1TrimEnd=1 V1TrimFlag=0 V2TrimBegin=0.25 V2TrimEnd=0.75 V2TrimFlag=0

Blank "Companion_Computer"
  location (X Y Z) 0.1625 0 0, rotation 0 0 0
  Mass: Point_Mass=0.085 Point_Mass_Flag=1

Blank "RC_Receiver"
  location (X Y Z) 0.1625 0 0.02, rotation 0 0 0
  Mass: Point_Mass=0.03 Point_Mass_Flag=1

Blank "Battery"
  location (X Y Z) 0.33125 0 0.0109375, rotation 0 0 0
  Mass: Point_Mass=1.523 Point_Mass_Flag=1

Blank "Camera"
  location (X Y Z) 0.0375 0 -0.07, rotation 0 0 0
  Mass: Point_Mass=0.639 Point_Mass_Flag=1

Blank "Flight_Controller"
  location (X Y Z) 0.5 0 0.0109375, rotation 0 0 0
  Mass: Point_Mass=0.0333 Point_Mass_Flag=1

Blank "Telemetry_Air_Module"
  location (X Y Z) 0.60625 0 0.053125, rotation 0 0 0
  Mass: Point_Mass=0.0145 Point_Mass_Flag=1

Blank "GPS_Anthena"
  location (X Y Z) 0.5 0 0.179687, rotation 0 0 0
  Mass: Point_Mass=0.033 Point_Mass_Flag=1

Blank "ESC"
  location (X Y Z) 0.6875 0 -0.005, rotation 0 0 0
  Mass: Point_Mass=0.1 Point_Mass_Flag=1

Blank "Motor"
  location (X Y Z) 0.78125 0 0.0199777, rotation 0 0 0
  Mass: Point_Mass=0.331 Point_Mass_Flag=1

Blank "CG"
  location (X Y Z) 0.474 0 0.056, rotation 0 0 0
