OpenVSP model (file version 5), 20 components.
Geometry view with OpenVSP parameter names; values to 6 digits, angles in degrees, lengths in the model's unit.
Overall bounding box: X_Min=-0.00385879 X_Len=1.24912 Y_Min=-1.09 Y_Len=2.18 Z_Min=-0.21 Z_Len=0.439518

Wing "Wing"
  location (X Y Z) 0.400128 0 0.0690107, rotation 0 3.65 0
  symmetric about XZ
  bounding box size 0.251503 2.18 0.0351625
  mass: Density=38 Shell_Flag=1 Mass_Area=0.02 Mass_Prior=0
  totals: TotalSpan=2.18 TotalProjectedSpan=2.18 TotalChord=0.199333 TotalArea=0.434547 TotalAR=10.9365
  root: chord 0.252, twist 0, NACA 4-series Camber=0.04 CamberLoc=0.6 ThickChord=0.13
  sections:
    n  Span      Root_Chord  Tip_Chord  Area       Sweep  Sweep_Location  Dihedral  Twist  Twist_Location  tip airfoil
    1  0.363333  0.252       0.236      0.0886533  0      0.25            0         0      0.25            as above
    2  0.363333  0.236       0.186      0.0766633  0      0.25            0         0      0.25            as above
    3  0.363333  0.186       0.1        0.0519567  0      0.25            0         0      0.25            as above

Stack "Fuselage"
  location (X Y Z) 0 0 0, rotation 0 0 0
  bounding box size 0.803859 0.110037 0.0833167
  mass: Density=0 Shell_Flag=1 Mass_Area=0.693 Mass_Prior=0
  cross sections:
    n  XDelta  YDelta  ZDelta  shape
    0  0       0       0       point
    1  0.2     0       0.02    super ellipse Super_Height=0.08 Super_M=2 Super_MaxWidthLoc=0 Super_N=2 Super_Width=0.105
    2  0.2     0       0       super ellipse Super_Height=0.08 Super_M=2 Super_MaxWidthLoc=0 Super_N=2 Super_Width=0.11
    3  0.2     0       0       super ellipse Super_Height=0.08 Super_M=2 Super_MaxWidthLoc=0 Super_N=2 Super_Width=0.1
    4  0.2     0       0       circle Circle_Diameter=0.068

Conformal "InnerFuselage", child of "Fuselage"
  location (X Y Z) 0 0 0, rotation 0 0 0
  bounding box size 0.789938 0.100034 0.0733141
  mass: Density=0 Shell_Flag=0 Mass_Area=1 Mass_Prior=0
  Design: ChordTrimFlag=0 ChordTrimMax=0.9 ChordTrimMin=0.1 Offset=0.005 UTrimFlag=0 UTrimMax=0.9 UTrimMin=0.1 V1TrimBegin=0.3 V1TrimEnd=1 V1TrimFlag=0 V2TrimBegin=0.25 V2TrimEnd=0.75 V2TrimFlag=0

Wing "HorizontalStabilizer"
  location (X Y Z) 1.13707 0 0.065, rotation 0 0 0
  symmetric about XZ
  bounding box size 0.103731 0.622388 0.0103792
  mass: Density=38 Shell_Flag=1 Mass_Area=0.02 Mass_Prior=0
  totals: TotalSpan=0.622388 TotalProjectedSpan=0.622388 TotalChord=0.103731 TotalArea=0.0645612 TotalAR=6
  root: chord 0.103731, twist 0, NACA 4-series Camber=0 CamberLoc=0.2 ThickChord=0.1
  sections:
    n  Span      Root_Chord  Tip_Chord  Area       Sweep  Sweep_Location  Dihedral  Twist  Twist_Location  tip airfoil
    1  0.311194  0.103731    0.103731   0.0322806  0      0.25            0         0      0.25            as above

Wing "VerticalStabilizer"
  location (X Y Z) 1.13558 0.311194 0.065, rotation 90 0 0
  symmetric about XZ
  bounding box size 0.109678 0.633363 0.164518
  mass: Density=38 Shell_Flag=1 Mass_Area=0.02 Mass_Prior=0
  totals: TotalSpan=0.329035 TotalProjectedSpan=0.329035 TotalChord=0.0822588 TotalArea=0.027066 TotalAR=4
  root: chord 0.109678, twist 0, NACA 4-series Camber=0 CamberLoc=0.2 ThickChord=0.1
  sections:
    n  Span      Root_Chord  Tip_Chord  Area      Sweep  Sweep_Location  Dihedral  Twist  Twist_Location  tip airfoil
    1  0.164518  0.109678    0.0548392  0.013533  0      0.25            0         0      0.25            as above

Propeller "Propeller"
  location (X Y Z) 0.81 0 0.02, rotation 0 0 0
  bounding box size 0 0.3556 0.3556
  mass: Density=0 Shell_Flag=1 Mass_Area=0.352 Mass_Prior=0
  Design: Diameter=0.3556 NumBlade=2 Beta34=0.3048 UseBeta34Flag=1 Feather=-19.6952 Rotate=0 Precone=0 ReverseFlag=0 FoldAngle=0 PropMode=2 AF=151.538 CLi=0.538798 Chord=0.177656 Solidity=0.113099 ConstructXoC=0.5 FeatherAxisXoC=0.5 FeatherOffsetXoC=0
  cross sections:
    n  RadiusFrac  shape
    0  0.2         ellipse Ellipse_Height=0.007112 Ellipse_Width=0.014224
    1  0.4         NACA 16-series Chord=0.0295593 IdealCl=0.7 ThickChord=0.144074
    2  1           NACA 16-series Chord=0.023114 IdealCl=0.2 ThickChord=0.03
  Chord along r/R (cubic Bezier): 0.2: 0.08, 0.333333: 0.15, 0.466667: 0.2, 0.6: 0.2, 0.716667: 0.2, 0.833333: 0.2, 0.95: 0.2, 0.966667: 0.2, 0.983333: 0.2, 1: 0.13
  Twist along r/R (PCHIP): 0.2: 46.75, 0.75: 20, 1: 13
  Thick along r/R (cubic Bezier): 0.2: 0.5, 0.233333: 0.3, 0.266667: 0.225, 0.3: 0.2, 0.4: 0.125, 0.5: 0.115, 0.6: 0.1, 0.733333: 0.075, 0.866667: 0.055, 1: 0.03
  CLI along r/R (cubic Bezier): 0.2: 0, 0.266667: 0.7, 0.333333: 0.7, 0.4: 0.7, 0.466667: 0.7, 0.533333: 0.7, 0.6: 0.7, 0.733333: 0.7, 0.866667: 0.7, 1: 0.2

Blank "CompanionComputer"
  location (X Y Z) 0.1625 0 0, rotation 0 0 0
  Mass: Point_Mass=0.085 Point_Mass_Flag=1

Blank "RCReceiver"
  location (X Y Z) 0.1625 0 0.02, rotation 0 0 0
  Mass: Point_Mass=0.03 Point_Mass_Flag=1

Blank "Battery"
  location (X Y Z) 0.33125 0 0.0109375, rotation 0 0 0
  Mass: Point_Mass=1.523 Point_Mass_Flag=1

Blank "Camera"
  location (X Y Z) 0.0375 0 -0.07, rotation 0 0 0
  Mass: Point_Mass=2 Point_Mass_Flag=1

Blank "FlightController"
  location (X Y Z) 0.5 0 0.0109375, rotation 0 0 0
  Mass: Point_Mass=0.0333 Point_Mass_Flag=1

Blank "TelemetryAirModule"
  location (X Y Z) 0.60625 0 0.053125, rotation 0 0 0
  Mass: Point_Mass=0.0145 Point_Mass_Flag=1

Blank "GPSAnthena"
  location (X Y Z) 0.5 0 0.179687, rotation 0 0 0
  Mass: Point_Mass=0.033 Point_Mass_Flag=1

Blank "ESC"
  location (X Y Z) 0.6875 0 -0.005, rotation 0 0 0
  Mass: Point_Mass=0.1 Point_Mass_Flag=1

Blank "Motor"
  location (X Y Z) 0.78125 0 0.0199777, rotation 0 0 0
  Mass: Point_Mass=0.331 Point_Mass_Flag=1

Blank "MainSpar"
  location (X Y Z) 0.463 0 0.065, rotation 0 0 0
  Mass: Point_Mass=0.142 Point_Mass_Flag=1

Blank "TailBooms"
  location (X Y Z) 0.813 0 0.065, rotation 0 0 0
  Mass: Point_Mass=0.108 Point_Mass_Flag=1

Blank "DesignCG"
  location (X Y Z) 0.374 0 0.008, rotation 0 0 0

Stack "NoseGear"
  location (X Y Z) 0.200494 -0.015 -0.185, rotation 0 0 90
  bounding box size 0.05 0.03 0.05
  mass: Density=1200 Shell_Flag=0 Mass_Area=1 Mass_Prior=0
  cross sections:
    n  XDelta  YDelta  ZDelta  shape
    0  0       0       0       circle Circle_Diameter=0.05
    1  0.03    0       0       as above

Stack "MainGear"
  location (X Y Z) 0.443575 0.175 -0.174635, rotation 0 0 90
  symmetric about XZ
  bounding box size 0.07 0.41 0.07
  mass: Density=1200 Shell_Flag=0 Mass_Area=1 Mass_Prior=0
  cross sections:
    n  XDelta  YDelta  ZDelta  shape
    0  0       0       0       circle Circle_Diameter=0.07
    1  0.03    0       0       as above

User parameters
  Default_Group:HS_Arm = 0.7  (Default_Desc)
  Default_Group:HS_VolCoeff = 0.5  (Default_Desc)
  Default_Group:VS_Arm = 0.7  (Default_Desc)
  Default_Group:VS_VolCoeff = 0.02  (Default_Desc)
  Default_Group:Wing_MGC = 0.208  (Default_Desc)

Parameter links (A drives B)
  Wing:XForm:Z_Rel_Location -> HorizontalStabilizer:XForm:Z_Rel_Location Offset=0
  Wing:XForm:Z_Rel_Location -> VerticalStabilizer:XForm:Z_Rel_Location Offset=0

Advanced link "HS_Sizing"
  input HS_VolCoeff = UserParm:Default_Group:HS_VolCoeff
  input Wing_MGC = UserParm:Default_Group:Wing_MGC
  input Wing_S = Wing:WingGeom:TotalArea
  input Wing_XLoc = Wing:XForm:X_Rel_Location
  input Wing_RootChord = Wing:XSec_1:Root_Chord
  input HS_Arm = UserParm:Default_Group:HS_Arm
  input HS_RootChord = HorizontalStabilizer:XSec_1:Root_Chord
  output HS_S = HorizontalStabilizer:WingGeom:TotalArea
  output HS_XLoc = HorizontalStabilizer:XForm:X_Rel_Location
    HS_S = Wing_S*Wing_MGC*HS_VolCoeff/HS_Arm;

    HS_XLoc = Wing_XLoc +  Wing_RootChord/4.0 + HS_Arm - HS_RootChord/4.0;

Advanced link "VS_Sizing"
  input Wing_S = Wing:WingGeom:TotalArea
  input Wing_RootChord = Wing:XSec_1:Root_Chord
  input VS_VolCoeff = UserParm:Default_Group:VS_VolCoeff
  input VS_Arm = UserParm:Default_Group:VS_Arm
  input Wing_Span = Wing:WingGeom:TotalSpan
  input Wing_XLoc = Wing:XForm:X_Rel_Location
  input VS_RootChord = VerticalStabilizer:XSec_1:Root_Chord
  input HS_Span = HorizontalStabilizer:WingGeom:TotalSpan
  output VS_XLoc = VerticalStabilizer:XForm:X_Rel_Location
  output VS_S = VerticalStabilizer:WingGeom:TotalArea
  output VS_YLoc = VerticalStabilizer:XForm:Y_Rel_Location
    VS_S = Wing_S*Wing_Span*VS_VolCoeff/VS_Arm;

    VS_XLoc = Wing_XLoc +  Wing_RootChord/4.0 + VS_Arm - VS_RootChord/4.0;

    VS_YLoc = HS_Span/2.0;

Advanced link "MainSpar_XZLoc"
  input Wing_XLoc = Wing:XForm:X_Rel_Location
  input Wing_ZLoc = Wing:XForm:Z_Rel_Location
  input Wing_RootChord = Wing:XSec_1:Root_Chord
  output MainSpar_ZLoc = MainSpar:XForm:Z_Rel_Location
  output MainSpar_XLoc = MainSpar:XForm:X_Rel_Location
    MainSpar_XLoc = Wing_XLoc + Wing_RootChord/4.0;

    MainSpar_ZLoc = Wing_ZLoc;

Advanced link "MainBooms_XZLoc"
  input Wing_RootChord = Wing:XSec_1:Root_Chord
  input Wing_XLoc = Wing:XForm:X_Rel_Location
  input Wing_ZLoc = Wing:XForm:Z_Rel_Location
  input HS_Arm = UserParm:Default_Group:HS_Arm
  output TailBooms_XLoc = TailBooms:XForm:X_Rel_Location
  output TailBooms_ZLoc = TailBooms:XForm:Z_Rel_Location
    float AC_XLoc =  Wing_XLoc + Wing_RootChord/4.0;

    TailBooms_XLoc = AC_XLoc + HS_Arm/2.0;
    TailBooms_ZLoc = Wing_ZLoc;

Advanced link "Propeller_XLoc"
  input Fuse_XDelta1 = Fuselage:XSec_1:XDelta
  input Fuse_XDelta2 = Fuselage:XSec_2:XDelta
  input Fuse_XDelta3 = Fuselage:XSec_3:XDelta
  input Fuse_XDelta4 = Fuselage:XSec_4:XDelta
  input Fuse_ZDelta1 = Fuselage:XSec_1:ZDelta
  output Propeller_XLoc = Propeller:XForm:X_Rel_Location
  output Propeller_ZLoc = Propeller:XForm:Z_Rel_Location
    Propeller_XLoc = Fuse_XDelta1 + Fuse_XDelta2 + Fuse_XDelta3 + Fuse_XDelta4 + 0.01;
    Propeller_ZLoc = Fuse_ZDelta1;

VSPAERO settings: Sref=0.434547 bref=2.18 cref=0.199333 Xcg=0 Ycg=0 Zcg=0 AlphaStart=-10 AlphaEnd=10 AlphaNpts=11 BetaStart=0 BetaEnd=0 BetaNpts=1 MachStart=0 MachEnd=0 MachNpts=1 ReCref=1e+07 Vinf=100 Rho=0.002377
